// COMSOL Multiphysics 6.2.0.415 model "Model2.mph"
// Outline of the model tree

Parameters
  Rhf = 0.2[mm]  // Inner radius, hollow fiber
  Lm = 0.08[mm]  // Thickness, membrane
  Lpc = 0.42[mm]  // Width, concentric permeate channel
  H = 21[mm]  // Length, fiber
  D = 1e-9[m^2/s]  // Diffusion constant, liquid phases
  Dm = 1e-9[m^2/s]  // Diffusion constant, membrane
  K = 0.7  // Partition coefficient
  c0_dia = 1[mol/liter]  // Inlet concentration, dialysate
  c0_per = c0_dia*0.1  // Inlet concentration, permeate
  c0_mem = 0[mol/liter]  // Initial concentration, membrane
  Uave_dia = 0.5[mm/s]  // Average velocity, dialysate
  Uave_per = 0.8[mm/s]  // Average velocity, permeate

Geometry
  geom1 "Geometry 1" (2D axisymmetric, length unit mm)
    r1: Rectangle | size = {Rhf, H}
    r2: Rectangle | pos = {Rhf, 0}; size = {Lm, H}
    r3: Rectangle | pos = {Rhf+Lm, 0}; size = {Lpc, H}
    fin: Finalize "Form Union"
    sel1: ExplicitSelection "Dialysate and Permeate" | selection = fin(1) domains 1, 3
    sel2: ExplicitSelection "Membrane" | selection = fin(1) domains 2

Materials
  mat1: Common "Water" on all domains
    def "Basic"
      thermalexpansioncoefficient = alpha_p(T)
      bulkviscosity = muB(T)
      dynamicviscosity = eta(T)
      ratioofspecificheat = gamma_w(T)
      electricconductivity = 5.5e-6[S/m]
      heatcapacity = Cp(T)
      density = rho(T)
      thermalconductivity = k(T)
      soundspeed = cs(T)
      eta: Piecewise
        arg = T
        pieces = 
          {273.15, 413.15, 1.3799566804-0.021224019151*T^1+1.3604562827E-4*T^2-4.6454090319E-7*T^3+8.9042735735E-10*T^4-9.0790692686E-13*T^5+3.8457331488E-16*T^6}
          {413.15, 553.75, 0.00401235783-2.10746715E-5*T^1+3.85772275E-8*T^2-2.39730284E-11*T^3}
        argunit = K
        fununit = Pa*s
      Cp: Piecewise | arg = T; pieces = {273.15, 553.75, 12010.1471-80.4072879*T^1+0.309866854*T^2-5.38186884E-4*T^3+3.62536437E-7*T^4}; argunit = K; fununit = J/(kg*K)
      rho: Piecewise
        arg = T
        smooth = contd1
        pieces = 
          {273.15, 293.15, 6.3092789034e-05*T^3-0.0603676398829*T^2+18.9229382407066*T-950.704055329848}
          {293.15, 373.15, 1.0335053319e-05*T^3-0.0133950656345*T^2+4.96928883266*T+432.257114008512}
        argunit = K
        fununit = kg/m^3
      k: Piecewise | arg = T; pieces = {273.15, 553.75, -0.869083936+0.00894880345*T^1-1.58366345E-5*T^2+7.97543259E-9*T^3}; argunit = K; fununit = W/(m*K)
      cs: Interpolation | table = {{273, 1403}, {278, 1427}, {283, 1447}, {293, 1481}, {303, 1507}, {313, 1526}, {323, 1541}, {333, 1552}, {343, 1555}, {353, 1555}, {363, 1550}, {373, 1543}}; interp = piecewisecubic; fununit = m/s; argunit = K
      an1: Analytic | funcname = alpha_p; expr = -1/rho(T)*d(rho(T),T); args = T; fununit = 1/K; argunit = K
      an2: Analytic | funcname = gamma_w; expr = 1+(T/Cp(T))*(alpha_p(T)*cs(T))^2; args = T; fununit = 1; argunit = K
      an3: Analytic | funcname = muB; expr = 2.79*eta(T); args = T; fununit = Pa*s; argunit = K

Physics
  tds: DilutedSpecies "Transport of Diluted Species" on all domains
    dependent variable c
    cdm1: ConvectionDiffusionMigration "Transport Properties - Dialysate and Permeate" (default)
      u_src = root.comp1.u
      D_c = D
    axi1: AxialSymmetry (default)
    nflx1: NoFlux (default)
    init1: init "Initial Values 1" (default) | initc = c0_dia
    cdm2: ConvectionDiffusionMigration "Transport Properties - Membrane" on domains 2 | D_c = Dm
    init2: init "Initial Values 2" on domains 3 | initc = c0_per
    in1: Inflow on boundaries 2 | c0 = c0_dia; BoundaryConditionType = FluxDanckwerts
    in2: Inflow on boundaries 8 | c0 = c0_per; BoundaryConditionType = FluxDanckwerts
    out1: Outflow on boundaries 3, 9
    pac1: PartitionCondition on boundaries 4 | K = K
    pac2: PartitionCondition on boundaries 7 | ReverseDirection = 1; K = K
  spf: LaminarFlow on selection geom1_sel1
    dependent variable u = {u, v, w}
    fp1: FluidProperties (default)
    init1: init "Initial Values 1" (default)
    axi1: AxialSymmetry (default)
    wallbc1: WallBC "Wall 1" (default)
    inl1: InletBoundary "Inlet 1" on boundaries 2 | BoundaryCondition = FullyDevelopedFlow; Uavfdf = Uave_dia
    inl2: InletBoundary "Inlet 2" on boundaries 8 | BoundaryCondition = FullyDevelopedFlow; Uavfdf = Uave_per
    out1: OutletBoundary "Outlet 1" on boundaries 3, 9

Mesh
  mesh1 "Mesh 1"
    size: MeshSizeDefault | hmax = 1.41; hmin = 0.0063; hcurve = 0.3; hgrad = 1.3
    map1: Map "Mapped 1" on remaining entities
      dis1: Distribution on boundaries 1, 4, 7, 10 | type = predefined; elemcount = 250; elemratio = 25
      dis2: Distribution on boundaries 5, 6 | type = predefined; elemcount = 7; elemratio = 2; symmetric = on
      dis3: Distribution on boundaries 2, 3 | type = predefined; elemcount = 20; elemratio = 2
      dis4: Distribution on boundaries 8, 9

Studies
  std1 "Study 1"
    stat: Stationary